OpenVSP model (file version 5), 4 components.
Geometry view with OpenVSP parameter names; values to 6 digits, angles in degrees, lengths in the model's unit.
Overall bounding box: X_Min=0 X_Len=44 Y_Min=-33 Y_Len=66 Z_Min=-2.32341 Z_Len=10.76

Fuselage "Fuselage"
  location (X Y Z) 0 0 0, rotation 0 0 0
  bounding box size 44 5.6221 5.36815
  Design: Length=44
  cross sections:
    n  XLocPercent  YLocPercent  ZLocPercent  shape
    0  0            0            0            point
    1  0.153689     0            0.00819672   edit curve Width=2.90816 Height=5.04082 AbsoluteFlag=0 SymType=1 cubic Bezier points (X Y): 0.908673 -0.00657895, 0.882143 -0.519737, 0.391327 -0.496711, 0 -0.5, -0.391327 -0.496711, -0.882143 -0.519737, -0.908673 -0.00657895, -0.908673 0.269563, -0.517347 0.486842, 0 0.5, 0.517347 0.486842, 0.908673 0.269563, 0.908673 -0.00657895
    2  0.287104     0            -0.00563525  edit curve Width=4.34194 Height=3.82041 AbsoluteFlag=0 SymType=1 cubic Bezier points (X Y): 0.613276 -0.00328947, 0.603222 -0.516447, 0.276142 -0.5, 0 -0.5, -0.276142 -0.5, -0.603222 -0.516447, -0.613276 -0.00328947, -0.613276 0.272853, -0.412202 0.5, 0 0.5, 0.412202 0.5, 0.613276 0.272853, 0.613276 -0.00328947
    3  0.5          0            -0.00819672  edit curve Width=5.35714 Height=3.5848 AbsoluteFlag=0 SymType=1 cubic Bezier points (X Y): 0.5 0, 0.5 -0.276142, 0.276142 -0.5, 0 -0.5, -0.276142 -0.5, -0.5 -0.276142, -0.5 0, -0.50947 0.526316, -0.460482 0.427632, 0 0.450658, 0.460482 0.427632, 0.50947 0.526316, 0.5 0
    4  0.75         0            -0.0152772   edit curve Width=5.35714 Height=2.83405 AbsoluteFlag=0 SymType=1 cubic Bezier points (X Y): 0.5 0, 0.5 -0.276142, 0.276142 -0.5, 0 -0.5, -0.276142 -0.5, -0.5 -0.276142, -0.5 0, -0.506579 0.584494, -0.5 0.497442, 0 0.5, 0.5 0.497442, 0.506579 0.584494, 0.5 0
    5  1            0            0            ellipse Ellipse_Height=0.01 Ellipse_Width=4.52178

Fuselage "Gondola"
  location (X Y Z) 13.0533 0 2.54098, rotation 0 0 0
  bounding box size 22.0026 5.26745 3.46436
  Design: Length=35
  cross sections:
    n  XLocPercent  YLocPercent  YRotate    ZLocPercent  shape
    0  0            0            0          0            point
    1  0.264344     0            20         -0.00819672  ellipse Ellipse_Height=1.97193 Ellipse_Width=4.7449
    2  0.507172     0            1.92857    -0.0163264   edit curve Width=4.7449 Height=2.31429 AbsoluteFlag=0 SymType=1 cubic Bezier points (X Y): 0.5 0, 0.5 -0.559776, 0.539474 -0.394347, 0 -0.43551, -0.539474 -0.394347, -0.5 -0.559776, -0.5 0, -0.5 0.276142, -0.276142 0.5, 0 0.5, 0.276142 0.5, 0.5 0.276142, 0.5 0
    3  0.75         0            0          -0.0465634   edit curve Width=4.7449 Height=1.59027 AbsoluteFlag=0 SymType=1 cubic Bezier points (X Y): 0.5 0, 0.509868 -0.569322, 0.582237 -0.294907, 0 -0.349811, -0.582237 -0.294907, -0.509868 -0.569322, -0.5 0, -0.5 0.276142, -0.276142 0.5, 0 0.5, 0.276142 0.5, 0.5 0.276142, 0.5 0
    4  0.883197     0            -0.642857  -0.0576592   ellipse Ellipse_Height=0.993919 Ellipse_Width=4.7449
    5  1            0            -46.9286   -0.0684964   ellipse Ellipse_Height=1.46939 Ellipse_Width=4.7449

Wing "Wing"
  location (X Y Z) 15.5738 2.29508 -0.297131, rotation 0 0 0
  symmetric about XZ
  bounding box size 12.7247 66 1.42539
  totals: TotalSpan=61.4098 TotalProjectedSpan=61.4098 TotalChord=5.73697 TotalArea=331.685 TotalAR=11.3697 MAC=6.58927
  root: chord 11.7222, twist 0, NACA 4-series Camber=0.02 CamberLoc=0.4 ThickChord=0.12
  sections:
    n  Span     Root_Chord  Tip_Chord  Area     Sweep  Sweep_Location  Dihedral  Twist  Twist_Location  tip airfoil
    1  12.8935  11.7222     3.94467    101      17     0               0         0      0.25            NACA 4-series Camber=0.02 CamberLoc=0.4 ThickChord=0.1
    2  17.8115  3.94467     3.3363     64.8424  17     0               0         0      0.25            as above

Wing "GO"
  location (X Y Z) 38.6441 2.0339 0, rotation 0 0 0
  symmetric about XZ
  bounding box size 5.10167 22.1358 8.65546
  totals: TotalSpan=24.466 TotalProjectedSpan=17.8933 TotalChord=3.2 TotalArea=78.2912 TotalAR=4.08948 MAC=3.2
  root: chord 3.2, twist 0, NACA 4-series Camber=0 CamberLoc=0.2 ThickChord=0.1
  sections:
    n  Span    Root_Chord  Tip_Chord  Area     Sweep    Sweep_Location  Dihedral  Twist  Twist_Location  tip airfoil
    1  12.233  3.2         3.2        39.1456  8.83614  0               43        0      0.25            NACA 4-series Camber=0 CamberLoc=0.2 ThickChord=0.08
