OpenVSP model (file version 5), 3 components.
Geometry view with OpenVSP parameter names; values to 6 digits, angles in degrees, lengths in the model's unit.
Overall bounding box: X_Min=0 X_Len=12 Y_Min=-10.1 Y_Len=20.2 Z_Min=-1 Z_Len=5.25321

Fuselage "Fuselage"
  location (X Y Z) 0 0 0, rotation 0 0 0
  bounding box size 12 2.0116 2.24
  Design: Length=12
  cross sections:
    n  XLocPercent  YLocPercent  ZLocPercent  shape
    0  0            0            0            edit curve Width=2 Height=2 AbsoluteFlag=0 SymType=0 cubic Bezier points (X Y): 0.5 0, 0.5 -0.132608, 0.447322 -0.259785, 0.353553 -0.353553, 0.259785 -0.447322, 0.132608 -0.5, 0 -0.5, -0.132608 -0.5, -0.259785 -0.447322, -0.353553 -0.353553, -0.447322 -0.259785, -0.5 -0.132608, -0.5 0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
    1  0.166667     0            0            as above
    2  0.483333     0            0            as above
    3  0.5          0            0.02         as above
    4  0.516667     0            0            as above
    5  0.833333     0            0            as above
    6  1            0            0            as above

Fuselage "Gondola"
  location (X Y Z) 3 0 0, rotation 0 0 0
  bounding box size 6 0.959333 0.781391
  Design: Length=6
  cross sections:
    n  XLocPercent  YLocPercent  ZLocPercent  shape
    0  0            0            0.666667     edit curve Width=0.5 Height=0.5 AbsoluteFlag=0 SymType=0 cubic Bezier points (X Y): 0.5 0, 0.5 -0.132608, 0.447322 -0.259785, 0.353553 -0.353553, 0.259785 -0.447322, 0.132608 -0.5, 0 -0.5, -0.132608 -0.5, -0.259785 -0.447322, -0.353553 -0.353553, -0.447322 -0.259785, -0.5 -0.132608, -0.5 0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
    1  0.5          0            0.666667     as above
    2  1            0            0.666667     as above

Wing "WingProtected"
  location (X Y Z) 1 1.1 1.3, rotation 0 0 0
  symmetric about XZ
  bounding box size 6.19615 20.2 0.400232
  totals: TotalSpan=18 TotalProjectedSpan=18 TotalChord=2.5 TotalArea=45 TotalAR=7.2 MAC=2.8
  root: chord 4, twist 0, NACA 4-series Camber=0 CamberLoc=0.2 ThickChord=0.1
  sections:
    n  Span  Root_Chord  Tip_Chord  Area  Sweep  Sweep_Location  Dihedral  Twist  Twist_Location  tip airfoil
    1  9     4           1          22.5  30     0               0         0      0.25            as above
