OpenVSP model (file version 5), 2 components.
Geometry view with OpenVSP parameter names; values to 6 digits, angles in degrees, lengths in the model's unit.
Overall bounding box: X_Min=0 X_Len=12 Y_Min=-1 Y_Len=6.25 Z_Min=-1 Z_Len=2.24

Fuselage "Fuselage"
  location (X Y Z) 0 0 0, rotation 0 0 0
  bounding box size 12 2 2.24
  Design: Length=12
  cross sections:
    n  XLocPercent  YLocPercent  ZLocPercent  shape
    0  0            0            0            edit curve Width=2 Height=2 AbsoluteFlag=0 SymType=0 cubic Bezier points (X Y): 0.5 0, 0.5 -0.275958, 0.275958 -0.5, 0 -0.5, -0.275958 -0.5, -0.5 -0.275958, -0.5 0, -0.5 0.275958, -0.275958 0.5, 0 0.5, 0.275958 0.5, 0.5 0.275958, 0.5 0
    1  0.166667     0            0            as above
    2  0.333333     0            0            as above
    3  0.483333     0            0            as above
    4  0.5          0            0.02         as above
    5  0.516667     0            0            as above
    6  0.666667     0            0            as above
    7  0.833333     0            0            as above
    8  1            0            0            as above

Fuselage "Gondola"
  location (X Y Z) 0 5 0, rotation 0 0 0
  bounding box size 12 0.5 0.5
  Design: Length=12
  cross sections:
    n  XLocPercent  YLocPercent  ZLocPercent  shape
    0  0            0            0            edit curve Width=0.5 Height=0.5 AbsoluteFlag=0 SymType=0 cubic Bezier points (X Y): 0.5 0, 0.5 -0.275958, 0.275958 -0.5, 0 -0.5, -0.275958 -0.5, -0.5 -0.275958, -0.5 0, -0.5 0.275958, -0.275958 0.5, 0 0.5, 0.275958 0.5, 0.5 0.275958, 0.5 0
    1  0.166667     0            0            as above
    2  0.333333     0            0            as above
    3  0.483333     0            0            as above
    4  0.5          0            0            as above
    5  0.516667     0            0            as above
    6  0.666667     0            0            as above
    7  0.833333     0            0            as above
    8  1            0            0            as above
