OpenVSP model (file version 5), 4 components.
Geometry view with OpenVSP parameter names; values to 6 digits, angles in degrees, lengths in the model's unit.
Overall bounding box: X_Min=0 X_Len=52.0341 Y_Min=-17.4429 Y_Len=34.8858 Z_Min=-1.52095 Z_Len=4.81074

Wing "Wing"
  location (X Y Z) 23.0476 4.64267 2.01093, rotation 0 0 0
  symmetric about XZ
  bounding box size 26.4026 34.8858 0.781135
  totals: TotalSpan=25.5953 TotalProjectedSpan=25.59 TotalChord=16.4001 TotalArea=419.766 TotalAR=1.56003 MAC=18.4336
  root: chord 26.4026, twist 0, NACA 4-series Camber=0 CamberLoc=0.2 ThickChord=0.02
  sections:
    n  Span     Root_Chord  Tip_Chord  Area     Sweep  Sweep_Location  Dihedral  Twist  Twist_Location  tip airfoil
    1  12.7976  26.4026     6.39764    209.883  46.36  0               -1.16628  0      0.25            NACA 4-series Camber=0 CamberLoc=0.2 ThickChord=0.08
  SS_Control "Elevons": EtaStart=0.216 EtaEnd=0.884 Length_C_Start=0.0887014 Length_C_End=0.224663 Length_Start=1.95866 Length_End=1.95866 LE_Flag=0 Surf_Type=2

Fuselage "Fuselage"
  location (X Y Z) 0 0 0, rotation 0 0 0
  bounding box size 52.0341 5.48353 4.81074
  Design: Length=52.0341
  cross sections:
    n   XLocPercent  YLocPercent  ZLocPercent   shape
    0   0            0            -1.66867e-08  point
    1   0.0201765    0            0.00276725    edit curve Width=0.757827 Height=0.506915 AbsoluteFlag=0 SymType=0 cubic Bezier points (X Y): 0.5 0, 0.5 -0.132608, 0.447322 -0.259785, 0.353553 -0.353553, 0.259785 -0.447322, 0.132608 -0.5, 0 -0.5, -0.132608 -0.5, -0.259785 -0.447322, -0.353553 -0.353553, -0.447322 -0.259785, -0.5 -0.132608, -0.5 0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
    2   0.0441362    0            0.00586092    edit curve Width=1.65775 Height=1.08875 AbsoluteFlag=0 SymType=0 cubic Bezier points (X Y): 0.5 0, 0.5 -0.132608, 0.447322 -0.259785, 0.353553 -0.353553, 0.259785 -0.447322, 0.132608 -0.5, 0 -0.5, -0.132608 -0.5, -0.259785 -0.447322, -0.353553 -0.353553, -0.447322 -0.259785, -0.5 -0.132608, -0.5 0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
    3   0.075662     0            0.00968495    edit curve Width=2.84031 Height=1.80325 AbsoluteFlag=0 SymType=0 cubic Bezier points (X Y): 0.5 0, 0.5 -0.132608, 0.447322 -0.259785, 0.353553 -0.353553, 0.259785 -0.447322, 0.132608 -0.5, 0 -0.5, -0.132608 -0.5, -0.259785 -0.447322, -0.353553 -0.353553, -0.447322 -0.259785, -0.5 -0.132608, -0.5 0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
    4   0.126734     0            0.0145492     edit curve Width=4.75265 Height=2.69771 AbsoluteFlag=0 SymType=0 cubic Bezier points (X Y): 0.5 0.0244492, 0.497868 -0.0915523, 0.413787 -0.308857, 0.33148 -0.38477, 0.24491 -0.45855, 0.121394 -0.5, 0 -0.5, -0.121394 -0.5, -0.24491 -0.45855, -0.33148 -0.38477, -0.413787 -0.308857, -0.497868 -0.0915523, -0.5 0.0244492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
    5   0.189155     0            0.0182839     edit curve Width=4.98336 Height=3.41435 AbsoluteFlag=0 SymType=0 cubic Bezier points (X Y): 0.5 0.0543316, 0.495263 -0.0413728, 0.372801 -0.368834, 0.304502 -0.422923, 0.226729 -0.472275, 0.107689 -0.5, 0 -0.5, -0.107689 -0.5, -0.226729 -0.472275, -0.304502 -0.422923, -0.372801 -0.368834, -0.495263 -0.0413728, -0.5 0.0543316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
    6   0.258512     0            0.0200263     edit curve Width=5.23885 Height=3.8886 AbsoluteFlag=0 SymType=0 cubic Bezier points (X Y): 0.5 0.0875342, 0.492368 0.0143823, 0.32726 -0.435475, 0.274526 -0.465315, 0.206528 -0.487524, 0.0924598 -0.5, 0 -0.5, -0.0924598 -0.5, -0.206528 -0.487524, -0.274526 -0.465315, -0.32726 -0.435475, -0.492368 0.0143823, -0.5 0.0875342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
    7   0.315259     0            0.0204863     edit curve Width=5.44769 Height=4.13099 AbsoluteFlag=0 SymType=0 cubic Bezier points (X Y): 0.5 0.1147, 0.49 0.06, 0.29 -0.49, 0.25 -0.5, 0.19 -0.5, 0.08 -0.5, 0 -0.5, -0.08 -0.5, -0.19 -0.5, -0.25 -0.5, -0.29 -0.49, -0.49 0.06, -0.5 0.1147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
    8   0.442932     0            0.0192254     edit curve Width=5.44769 Height=4.18487 AbsoluteFlag=0 SymType=0 cubic Bezier points (X Y): 0.493757 0.241478, 0.493757 0.129095, 0.493757 0.0167115, 0.493757 -0.095672, 0.493757 -0.0651481, 0.359691 -0.489026, 0.25 -0.5, 0.19 -0.5, 0.08 -0.5, 0 -0.5, -0.08 -0.5, -0.19 -0.5, -0.25 -0.5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
    9   0.696636     0            0.0170731     edit curve Width=5.44769 Height=4.80282 AbsoluteFlag=0 SymType=0 cubic Bezier points (X Y): 0.493757 0.233727, 0.493757 0.135803, 0.493757 0.0378794, 0.493757 -0.0600443, 0.493757 -0.0651481, 0.359691 -0.489026, 0.25 -0.5, 0.19 -0.5, 0.08 -0.5, 0 -0.5, -0.08 -0.5, -0.19 -0.5, -0.25 -0.5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
    10  0.89499      0            0.0169709     edit curve Width=5.44769 Height=4.80282 AbsoluteFlag=0 SymType=0 cubic Bezier points (X Y): 0.493757 0.234834, 0.493757 0.13691, 0.493757 0.0389862, 0.493757 -0.0589375, 0.493757 -0.0651481, 0.359691 -0.489026, 0.25 -0.5, 0.19 -0.5, 0.08 -0.5, 0 -0.5, -0.08 -0.5, -0.19 -0.5, -0.25 -0.5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
    11  0.95034      0            0.0169224     edit curve Width=5.44769 Height=4.80282 AbsoluteFlag=0 SymType=0 cubic Bezier points (X Y): 0.493757 0.235359, 0.493757 0.137436, 0.493757 0.0395121, 0.493757 -0.0584116, 0.493757 -0.0651481, 0.359691 -0.489026, 0.25 -0.5, 0.19 -0.5, 0.08 -0.5, 0 -0.5, -0.08 -0.5, -0.19 -0.5, -0.25 -0.5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
    12  0.951742     0            0.0169219     edit curve Width=5.44769 Height=4.80282 AbsoluteFlag=0 SymType=0 cubic Bezier points (X Y): 0.493757 0.235364, 0.493757 0.13744, 0.493757 0.0395167, 0.493757 -0.0584071, 0.493757 -0.0651481, 0.359691 -0.489026, 0.25 -0.5, 0.19 -0.5, 0.08 -0.5, 0 -0.5, -0.08 -0.5, -0.19 -0.5, -0.25 -0.5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
    13  0.961869     0            0.0165276     edit curve Width=5.12 Height=4.3 AbsoluteFlag=0 SymType=0 cubic Bezier points (X Y): 0.494507 0.20568, 0.494507 0.178684, 0.494507 0.148105, 0.494507 0.124694, 0.494507 -0.104946, 0.359984 -0.490343, 0.2536 -0.5, 0.190944 -0.5, 0.0816 -0.5, 0 -0.5, -0.0816 -0.5, -0.190944 -0.5, -0.2536 -0.5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
    14  0.974361     0            0.0153745     edit curve Width=4.4 Height=3.25 AbsoluteFlag=0 SymType=0 cubic Bezier points (X Y): 0.496691 0.123875, 0.496691 0.0651924, 0.496691 -0.0075277, 0.496691 -0.0521732, 0.496691 -0.221024, 0.360839 -0.494184, 0.2641 -0.5, 0.193697 -0.5, 0.0862667 -0.5, 0 -0.5, -0.0862667 -0.5, -0.193697 -0.5, -0.2641 -0.5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
    15  0.988198     0            0.0136449     edit curve Width=3.48 Height=2.1 AbsoluteFlag=0 SymType=0 cubic Bezier points (X Y): 0.499126 0.0327218, 0.499126 -0.0612699, 0.499126 -0.180947, 0.499126 -0.249253, 0.499126 -0.350369, 0.361791 -0.498464, 0.2758 -0.5, 0.196765 -0.5, 0.0914667 -0.5, 0 -0.5, -0.0914667 -0.5, -0.196765 -0.5, -0.2758 -0.5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
    16  0.998191     0            0.0125879     edit curve Width=2.91 Height=1.5 AbsoluteFlag=0 SymType=0 cubic Bezier points (X Y): 0.5 0, 0.5 -0.106667, 0.5 -0.2432, 0.5 -0.32, 0.5 -0.3968, 0.362133 -0.5, 0.28 -0.5, 0.197867 -0.5, 0.0933333 -0.5, 0 -0.5, -0.0933333 -0.5, -0.197867 -0.5, -0.28 -0.5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
    17  1            0            0.0122996     edit curve Width=2.82349 Height=1.40945 AbsoluteFlag=0 SymType=0 cubic Bezier points (X Y): 0.5 0, 0.5 -0.106667, 0.5 -0.2432, 0.5 -0.32, 0.5 -0.3968, 0.362133 -0.5, 0.28 -0.5, 0.197867 -0.5, 0.0933333 -0.5, 0 -0.5, -0.0933333 -0.5, -0.197867 -0.5, -0.28 -0.5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
    18  0.999536     0            0.0122996     edit curve Width=2.69 Height=1.28 AbsoluteFlag=0 SymType=0 cubic Bezier points (X Y): 0.5 0, 0.5 -0.106667, 0.5 -0.2432, 0.5 -0.32, 0.5 -0.3968, 0.362133 -0.5, 0.28 -0.5, 0.197867 -0.5, 0.0933333 -0.5, 0 -0.5, -0.0933333 -0.5, -0.197867 -0.5, -0.28 -0.5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
    19  0.996269     0            0.0122996     edit curve Width=2.625 Height=1.22 AbsoluteFlag=0 SymType=0 cubic Bezier points (X Y): 0.5 0, 0.5 -0.106667, 0.5 -0.2432, 0.5 -0.32, 0.5 -0.3968, 0.362133 -0.5, 0.28 -0.5, 0.197867 -0.5, 0.0933333 -0.5, 0 -0.5, -0.0933333 -0.5, -0.197867 -0.5, -0.28 -0.5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
    20  0.983585     0            0.0122996     edit curve Width=2.42 Height=1.07 AbsoluteFlag=0 SymType=0 cubic Bezier points (X Y): 0.5 0, 0.5 -0.106667, 0.5 -0.2432, 0.5 -0.32, 0.5 -0.3968, 0.362133 -0.5, 0.28 -0.5, 0.197867 -0.5, 0.0933333 -0.5, 0 -0.5, -0.0933333 -0.5, -0.197867 -0.5, -0.28 -0.5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
    21  0.9734       0            0.0122996     edit curve Width=2.34 Height=1.02 AbsoluteFlag=0 SymType=0 cubic Bezier points (X Y): 0.5 0, 0.5 -0.106667, 0.5 -0.2432, 0.5 -0.32, 0.5 -0.3968, 0.362133 -0.5, 0.28 -0.5, 0.197867 -0.5, 0.0933333 -0.5, 0 -0.5, -0.0933333 -0.5, -0.197867 -0.5, -0.28 -0.5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

Fuselage "Gondola"
  location (X Y Z) 0 0 0, rotation 0 0 0
  symmetric about XZ
  bounding box size 31.0501 9.27334 1.9
  Design: Length=52.0341
  cross sections:
    n   XLocPercent  YLocPercent  ZLocPercent  shape
    0   0.395894     0.0680323    0.0272898    edit curve Width=1.3 Height=1.48 AbsoluteFlag=0 SymType=0 cubic Bezier points (X Y): 0.5 0, 0.5 -0.157658, 0.5 -0.472973, 0.5 -0.472973, 0.5 -0.472973, 0.174675 -0.4, 0.05 -0.4, -0.0746753 -0.4, -0.195986 -0.5, -0.27 -0.5, -0.344014 -0.5, -0.410435 -0.5, -0.44 -0.5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
    1   0.371871     0.0679362    0.0272898    edit curve Width=1.35 Height=1.56 AbsoluteFlag=0 SymType=0 cubic Bezier points (X Y): 0.5 0, 0.5 -0.160256, 0.5 -0.480769, 0.5 -0.480769, 0.5 -0.480769, 0.174675 -0.4, 0.05 -0.4, -0.0746753 -0.4, -0.195986 -0.5, -0.27 -0.5, -0.344014 -0.5, -0.410435 -0.5, -0.44 -0.5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
    2   0.356112     0.0680323    0.027482     edit curve Width=1.44 Height=1.7 AbsoluteFlag=0 SymType=0 cubic Bezier points (X Y): 0.5 0, 0.5 -0.160784, 0.5 -0.482353, 0.5 -0.482353, 0.5 -0.482353, 0.174675 -0.4, 0.05 -0.4, -0.0746753 -0.4, -0.195986 -0.5, -0.27 -0.5, -0.344014 -0.5, -0.410435 -0.5, -0.44 -0.5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
    3   0.353614     0.0682245    0.0275781    edit curve Width=1.55 Height=1.82 AbsoluteFlag=0 SymType=0 cubic Bezier points (X Y): 0.5 0, 0.5 -0.161172, 0.5 -0.483516, 0.5 -0.483516, 0.5 -0.483516, 0.174675 -0.4, 0.05 -0.4, -0.0746753 -0.4, -0.195986 -0.5, -0.27 -0.5, -0.344014 -0.5, -0.410435 -0.5, -0.44 -0.5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
    4   0.356112     0.0682245    0.0275781    edit curve Width=1.61 Height=1.89 AbsoluteFlag=0 SymType=0 cubic Bezier points (X Y): 0.5 0, 0.5 -0.161376, 0.5 -0.484127, 0.5 -0.484127, 0.5 -0.484127, 0.174675 -0.4, 0.05 -0.4, -0.0746753 -0.4, -0.195986 -0.5, -0.27 -0.5, -0.344014 -0.5, -0.410435 -0.5, -0.44 -0.5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
    5   0.371871     0.068801     0.0277702    edit curve Width=1.7 Height=1.89 AbsoluteFlag=0 SymType=0 cubic Bezier points (X Y): 0.5 -0.0026455, 0.5 -0.157848, 0.5 -0.468254, 0.5 -0.468254, 0.5 -0.468254, 0.174675 -0.4, 0.05 -0.4, -0.0746753 -0.4, -0.195986 -0.5, -0.27 -0.5, -0.344014 -0.5, -0.410435 -0.5, -0.44 -0.5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
    6   0.403581     0.0699541    0.0280585    edit curve Width=1.82 Height=1.8109 AbsoluteFlag=0 SymType=0 cubic Bezier points (X Y): 0.5 0.0906593, 0.5 -0.0274725, 0.5 -0.198122, 0.5 -0.263736, 0.5 -0.32935, 0.174675 -0.36155, 0.05 -0.4, -0.0746753 -0.43845, -0.195986 -0.5, -0.27 -0.5, -0.344014 -0.5, -0.410435 -0.5, -0.44 -0.5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
    7   0.426643     0.0701139    0.0283468    edit curve Width=1.90495 Height=1.75 AbsoluteFlag=0 SymType=0 cubic Bezier points (X Y): 0.5 0.21496, 0.5 0.163659, 0.5 0.137981, 0.5 0.0610563, 0.5 -0.0158683, 0.174675 -0.345216, 0.05 -0.4, -0.0746753 -0.454784, -0.195986 -0.5, -0.27 -0.5, -0.344014 -0.5, -0.410435 -0.5, -0.44 -0.5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
    8   0.442932     0.0704586    0.0283468    edit curve Width=1.94083 Height=1.75182 AbsoluteFlag=0 SymType=0 cubic Bezier points (X Y): 0.5 0.305927, 0.5 0.30488, 0.5 0.304874, 0.5 0.302787, 0.5 0.300701, 0.174675 -0.342425, 0.05 -0.400525, -0.0746753 -0.458625, -0.195986 -0.5, -0.27 -0.499873, -0.344014 -0.499747, -0.410435 -0.499633, -0.44 -0.499582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
    9   0.443124     0.0704586    0.0283526    edit curve Width=1.94083 Height=1.75122 AbsoluteFlag=0 SymType=0 cubic Bezier points (X Y): 0.5 0.30586, 0.5 0.302097, 0.5 0.301988, 0.5 0.294572, 0.5 0.287177, 0.174675 -0.342509, 0.05 -0.400526, -0.0746753 -0.458542, -0.195986 -0.5, -0.27 -0.499873, -0.344014 -0.499746, -0.410435 -0.499633, -0.44 -0.499582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
    10  0.4437       0.0704586    0.0283701    edit curve Width=1.94083 Height=1.7494 AbsoluteFlag=0 SymType=0 cubic Bezier points (X Y): 0.5 0.305658, 0.5 0.298796, 0.5 0.298416, 0.5 0.285072, 0.5 0.27177, 0.174675 -0.342611, 0.05 -0.400526, -0.0746753 -0.458441, -0.195986 -0.5, -0.27 -0.499873, -0.344014 -0.499746, -0.410435 -0.499632, -0.44 -0.499582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
    11  0.444853     0.0704586    0.028405     edit curve Width=1.94083 Height=1.74577 AbsoluteFlag=0 SymType=0 cubic Bezier points (X Y): 0.5 0.305254, 0.5 0.295124, 0.5 0.294282, 0.5 0.274865, 0.5 0.255512, 0.174675 -0.342724, 0.05 -0.400527, -0.0746753 -0.458331, -0.195986 -0.5, -0.27 -0.499873, -0.344014 -0.499746, -0.410435 -0.499631, -0.44 -0.499581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
    12  0.446775     0.0704586    0.0284632    edit curve Width=1.94083 Height=1.73971 AbsoluteFlag=0 SymType=0 cubic Bezier points (X Y): 0.5 0.304575, 0.5 0.290816, 0.5 0.289247, 0.5 0.263298, 0.5 0.237438, 0.174675 -0.342856, 0.05 -0.400529, -0.0746753 -0.458202, -0.195986 -0.5, -0.27 -0.499872, -0.344014 -0.499745, -0.410435 -0.49963, -0.44 -0.499579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
    13  0.449658     0.0704586    0.0285505    edit curve Width=1.94083 Height=1.73062 AbsoluteFlag=0 SymType=0 cubic Bezier points (X Y): 0.5 0.303549, 0.5 0.285848, 0.5 0.283232, 0.5 0.250446, 0.5 0.217778, 0.174675 -0.343009, 0.05 -0.400532, -0.0746753 -0.458054, -0.195986 -0.5, -0.27 -0.499872, -0.344014 -0.499743, -0.410435 -0.499628, -0.44 -0.499577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
    14  0.453502     0.0704586    0.0286669    edit curve Width=1.94083 Height=1.71851 AbsoluteFlag=0 SymType=0 cubic Bezier points (X Y): 0.5 0.302164, 0.5 0.280424, 0.5 0.276456, 0.5 0.236943, 0.5 0.197577, 0.174675 -0.343177, 0.05 -0.400536, -0.0746753 -0.457895, -0.195986 -0.5, -0.27 -0.499871, -0.344014 -0.499742, -0.410435 -0.499626, -0.44 -0.499574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
    15  0.457392     0.0704586    0.0287848    edit curve Width=1.94083 Height=1.70624 AbsoluteFlag=0 SymType=0 cubic Bezier points (X Y): 0.5 0.300742, 0.5 0.275657, 0.5 0.270352, 0.5 0.225485, 0.5 0.180791, 0.174675 -0.343324, 0.05 -0.400539, -0.0746753 -0.457755, -0.195986 -0.5, -0.27 -0.49987, -0.344014 -0.49974, -0.410435 -0.499623, -0.44 -0.499571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
    16  0.480454     0.0704586    0.0294833    edit curve Width=1.94083 Height=1.63355 AbsoluteFlag=0 SymType=0 cubic Bezier points (X Y): 0.5 0.291876, 0.5 0.25308, 0.5 0.240172, 0.5 0.175489, 0.5 0.111084, 0.174675 -0.344036, 0.05 -0.400563, -0.0746753 -0.457091, -0.195986 -0.5, -0.27 -0.499864, -0.344014 -0.499728, -0.410435 -0.499606, -0.44 -0.499552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
    17  0.509281     0.0704586    0.0303564    edit curve Width=1.94083 Height=1.54269 AbsoluteFlag=0 SymType=0 cubic Bezier points (X Y): 0.5 0.279617, 0.5 0.22948, 0.5 0.207496, 0.5 0.129207, 0.5 0.0512765, 0.174675 -0.344806, 0.05 -0.400597, -0.0746753 -0.456387, -0.195986 -0.5, -0.27 -0.499856, -0.344014 -0.499712, -0.410435 -0.499583, -0.44 -0.499525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
    18  0.538108     0.0704586    0.0312295    edit curve Width=1.94083 Height=1.45182 AbsoluteFlag=0 SymType=0 cubic Bezier points (X Y): 0.5 0.265824, 0.5 0.207169, 0.5 0.176435, 0.5 0.0898588, 0.5 0.00369051, 0.174675 -0.345563, 0.05 -0.400634, -0.0746753 -0.455705, -0.195986 -0.5, -0.27 -0.499847, -0.344014 -0.499694, -0.410435 -0.499557, -0.44 -0.499496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
    19  0.576545     0.0704586    0.0327669    edit curve Width=1.94083 Height=1.26182 AbsoluteFlag=0 SymType=0 cubic Bezier points (X Y): 0.5 0.242455, 0.5 0.171341, 0.5 0.1245, 0.5 0.0291145, 0.5 -0.0658365, 0.174675 -0.346989, 0.05 -0.400729, -0.0746753 -0.454469, -0.195986 -0.5, -0.27 -0.499824, -0.344014 -0.499648, -0.410435 -0.49949, -0.44 -0.49942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
    20  0.614981     0.0704586    0.0343041    edit curve Width=1.94083 Height=1.07179 AbsoluteFlag=0 SymType=0 cubic Bezier points (X Y): 0.5 0.21081, 0.5 0.127086, 0.5 0.0587933, 0.5 -0.0403627, 0.5 -0.139057, 0.174675 -0.349059, 0.05 -0.400856, -0.0746753 -0.452653, -0.195986 -0.5, -0.27 -0.499793, -0.344014 -0.499586, -0.410435 -0.4994, -0.44 -0.499317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
    21  0.653417     0.0704586    0.0363479    edit curve Width=1.94083 Height=0.803881 AbsoluteFlag=0 SymType=0 cubic Bezier points (X Y): 0.5 0.148776, 0.5 0.0412517, 0.5 -0.0840788, 0.5 -0.173797, 0.5 -0.263059, 0.174675 -0.355301, 0.05 -0.401141, -0.0746753 -0.44698, -0.195986 -0.5, -0.27 -0.499724, -0.344014 -0.499448, -0.410435 -0.4992, -0.44 -0.499089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
    22  0.696636     0.0704586    0.0386464    edit curve Width=1.94083 Height=0.502673 AbsoluteFlag=0 SymType=0 cubic Bezier points (X Y): 0.5 0, 0.5 -0.158768, 0.5 -0.476303, 0.5 -0.476303, 0.5 -0.476303, 0.174675 -0.40196, 0.05 -0.40133, -0.0746753 -0.400699, -0.195986 -0.5, -0.27 -0.499558, -0.344014 -0.499117, -0.410435 -0.49872, -0.44 -0.498544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
    23  0.73029      0.0704586    0.038649     edit curve Width=1.94083 Height=0.437261 AbsoluteFlag=0 SymType=0 cubic Bezier points (X Y): 0.5 -0.000314006, 0.5 -0.166876, 0.5 -0.5, 0.5 -0.5, 0.5 -0.5, 0.174675 -0.395872, 0.05 -0.395192, -0.0746753 -0.394512, -0.195986 -0.493169, -0.27 -0.492664, -0.344014 -0.492158, -0.410435 -0.491704, -0.44 -0.491502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
    24  0.768726     0.0704586    0.0386464    edit curve Width=1.94083 Height=0.380212 AbsoluteFlag=0 SymType=0 cubic Bezier points (X Y): 0.5 0, 0.5 -0.166667, 0.5 -0.5, 0.5 -0.5, 0.5 -0.5, 0.174675 -0.367539, 0.05 -0.366812, -0.0746753 -0.366086, -0.195986 -0.459028, -0.27 -0.458486, -0.344014 -0.457944, -0.410435 -0.457458, -0.44 -0.457241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
    25  0.807163     0.0704586    0.0386464    edit curve Width=1.94083 Height=0.315375 AbsoluteFlag=0 SymType=0 cubic Bezier points (X Y): 0.5 0, 0.5 -0.166667, 0.5 -0.5, 0.5 -0.5, 0.5 -0.5, 0.174675 -0.337748, 0.05 -0.336942, -0.0746753 -0.336136, -0.195986 -0.423455, -0.27 -0.42285, -0.344014 -0.422246, -0.410435 -0.421704, -0.44 -0.421462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
    26  0.845599     0.0704586    0.0386464    edit curve Width=1.94083 Height=0.243463 AbsoluteFlag=0 SymType=0 cubic Bezier points (X Y): 0.5 0, 0.5 -0.166667, 0.5 -0.5, 0.5 -0.5, 0.5 -0.5, 0.174675 -0.300924, 0.05 -0.299992, -0.0746753 -0.29906, -0.195986 -0.380151, -0.27 -0.379445, -0.344014 -0.37874, -0.410435 -0.378107, -0.44 -0.377825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
    27  0.884035     0.0704586    0.0386464    edit curve Width=1.94083 Height=0.164967 AbsoluteFlag=0 SymType=0 cubic Bezier points (X Y): 0.5 0, 0.5 -0.166667, 0.5 -0.5, 0.5 -0.5, 0.5 -0.5, 0.174675 -0.241997, 0.05 -0.240887, -0.0746753 -0.239776, -0.195986 -0.312272, -0.27 -0.31141, -0.344014 -0.310548, -0.410435 -0.309774, -0.44 -0.309429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
    28  0.912863     0.0704586    0.0386498    edit curve Width=1.94083 Height=0.105638 AbsoluteFlag=0 SymType=0 cubic Bezier points (X Y): 0.5 -0.00167385, 0.5 -0.167783, 0.5 -0.5, 0.5 -0.5, 0.5 -0.5, 0.174675 -0.321273, 0.05 -0.318959, -0.0746753 -0.316645, -0.195986 -0.40493, -0.27 -0.403158, -0.344014 -0.401387, -0.410435 -0.399798, -0.44 -0.39909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
    29  0.932081     0.0704586    0.0386676    edit curve Width=1.94083 Height=0.0811345 AbsoluteFlag=0 SymType=0 cubic Bezier points (X Y): 0.5 -0.0136097, 0.5 -0.17574, 0.5 -0.5, 0.5 -0.5, 0.5 -0.5, 0.174675 -0.379324, 0.05 -0.37577, -0.0746753 -0.372216, -0.195986 -0.465434, -0.27 -0.46275, -0.344014 -0.460065, -0.410435 -0.457656, -0.44 -0.456584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
    30  0.94169      0.0704586    0.0386691    edit curve Width=1.94083 Height=0.0696521 AbsoluteFlag=0 SymType=0 cubic Bezier points (X Y): 0.5 -0.0169889, 0.5 -0.169897, 0.5 -0.475712, 0.5 -0.475712, 0.5 -0.475712, 0.174675 -0.414962, 0.05 -0.410262, -0.0746753 -0.405561, -0.195986 -0.5, -0.27 -0.496812, -0.344014 -0.493624, -0.410435 -0.490763, -0.44 -0.48949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
    31  0.947455     0.0704586    0.038654     edit curve Width=1.94083 Height=0.0644349 AbsoluteFlag=0 SymType=0 cubic Bezier points (X Y): 0.5 -0.00612496, 0.5 -0.141271, 0.5 -0.397075, 0.5 -0.411564, 0.5 -0.426053, 0.174675 -0.40741, 0.05 -0.413895, -0.0746753 -0.419768, -0.195986 -0.5, -0.27 -0.496554, -0.344014 -0.493108, -0.410435 -0.490016, -0.44 -0.488639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
    32  0.95034      0.0704586    0.0386464    edit curve Width=1.94083 Height=0.0618241 AbsoluteFlag=0 SymType=0 cubic Bezier points (X Y): 0.5 0, 0.5 -0.122067, 0.5 -0.325511, 0.5 -0.3662, 0.5 -0.406889, 0.174675 -0.394585, 0.05 -0.414887, -0.0746753 -0.434717, -0.195986 -0.5, -0.27 -0.496409, -0.344014 -0.492817, -0.410435 -0.489594, -0.44 -0.488159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

Fuselage "Aux_Body"
  location (X Y Z) 0 12 0, rotation 12 17 26
  bounding box size 31.0501 9.27334 1.9
  Design: Length=52.0341
  cross sections:
    n   XLocPercent  YLocPercent  ZLocPercent  shape
    0   0.395894     0.0680323    0.0272898    edit curve Width=1.3 Height=1.48 AbsoluteFlag=0 SymType=0 cubic Bezier points (X Y): 0.5 0, 0.5 -0.157658, 0.5 -0.472973, 0.5 -0.472973, 0.5 -0.472973, 0.174675 -0.4, 0.05 -0.4, -0.0746753 -0.4, -0.195986 -0.5, -0.27 -0.5, -0.344014 -0.5, -0.410435 -0.5, -0.44 -0.5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
    1   0.371871     0.0679362    0.0272898    edit curve Width=1.35 Height=1.56 AbsoluteFlag=0 SymType=0 cubic Bezier points (X Y): 0.5 0, 0.5 -0.160256, 0.5 -0.480769, 0.5 -0.480769, 0.5 -0.480769, 0.174675 -0.4, 0.05 -0.4, -0.0746753 -0.4, -0.195986 -0.5, -0.27 -0.5, -0.344014 -0.5, -0.410435 -0.5, -0.44 -0.5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
    2   0.356112     0.0680323    0.027482     edit curve Width=1.44 Height=1.7 AbsoluteFlag=0 SymType=0 cubic Bezier points (X Y): 0.5 0, 0.5 -0.160784, 0.5 -0.482353, 0.5 -0.482353, 0.5 -0.482353, 0.174675 -0.4, 0.05 -0.4, -0.0746753 -0.4, -0.195986 -0.5, -0.27 -0.5, -0.344014 -0.5, -0.410435 -0.5, -0.44 -0.5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
    3   0.353614     0.0682245    0.0275781    edit curve Width=1.55 Height=1.82 AbsoluteFlag=0 SymType=0 cubic Bezier points (X Y): 0.5 0, 0.5 -0.161172, 0.5 -0.483516, 0.5 -0.483516, 0.5 -0.483516, 0.174675 -0.4, 0.05 -0.4, -0.0746753 -0.4, -0.195986 -0.5, -0.27 -0.5, -0.344014 -0.5, -0.410435 -0.5, -0.44 -0.5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
    4   0.356112     0.0682245    0.0275781    edit curve Width=1.61 Height=1.89 AbsoluteFlag=0 SymType=0 cubic Bezier points (X Y): 0.5 0, 0.5 -0.161376, 0.5 -0.484127, 0.5 -0.484127, 0.5 -0.484127, 0.174675 -0.4, 0.05 -0.4, -0.0746753 -0.4, -0.195986 -0.5, -0.27 -0.5, -0.344014 -0.5, -0.410435 -0.5, -0.44 -0.5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
    5   0.371871     0.068801     0.0277702    edit curve Width=1.7 Height=1.8333 AbsoluteFlag=0 SymType=0 cubic Bezier points (X Y): 0.5 -0.0026455, 0.5 -0.157848, 0.5 -0.468254, 0.5 -0.468254, 0.5 -0.468254, 0.174675 -0.4, 0.05 -0.4, -0.0746753 -0.4, -0.195986 -0.5, -0.27 -0.5, -0.344014 -0.5, -0.410435 -0.5, -0.44 -0.5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
    6   0.403581     0.0699541    0.0280585    edit curve Width=1.82 Height=1.82 AbsoluteFlag=0 SymType=0 cubic Bezier points (X Y): 0.5 0.0906593, 0.5 -0.0274725, 0.5 -0.198122, 0.5 -0.263736, 0.5 -0.32935, 0.174675 -0.36155, 0.05 -0.4, -0.0746753 -0.43845, -0.195986 -0.5, -0.27 -0.5, -0.344014 -0.5, -0.410435 -0.5, -0.44 -0.5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
    7   0.426643     0.0701139    0.0283468    edit curve Width=1.90495 Height=1.75 AbsoluteFlag=0 SymType=0 cubic Bezier points (X Y): 0.5 0.21496, 0.5 0.163659, 0.5 0.137981, 0.5 0.0610563, 0.5 -0.0158683, 0.174675 -0.345216, 0.05 -0.4, -0.0746753 -0.454784, -0.195986 -0.5, -0.27 -0.5, -0.344014 -0.5, -0.410435 -0.5, -0.44 -0.5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
    8   0.442932     0.0704586    0.0283468    edit curve Width=1.94083 Height=1.75182 AbsoluteFlag=0 SymType=0 cubic Bezier points (X Y): 0.5 0.305927, 0.5 0.30488, 0.5 0.304874, 0.5 0.302787, 0.5 0.300701, 0.174675 -0.342425, 0.05 -0.400525, -0.0746753 -0.458625, -0.195986 -0.5, -0.27 -0.499873, -0.344014 -0.499747, -0.410435 -0.499633, -0.44 -0.499582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
    9   0.443124     0.0704586    0.0283526    edit curve Width=1.94083 Height=1.75122 AbsoluteFlag=0 SymType=0 cubic Bezier points (X Y): 0.5 0.30586, 0.5 0.302097, 0.5 0.301988, 0.5 0.294572, 0.5 0.287177, 0.174675 -0.342509, 0.05 -0.400526, -0.0746753 -0.458542, -0.195986 -0.5, -0.27 -0.499873, -0.344014 -0.499746, -0.410435 -0.499633, -0.44 -0.499582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
    10  0.4437       0.0704586    0.0283701    edit curve Width=1.94083 Height=1.7494 AbsoluteFlag=0 SymType=0 cubic Bezier points (X Y): 0.5 0.305658, 0.5 0.298796, 0.5 0.298416, 0.5 0.285072, 0.5 0.27177, 0.174675 -0.342611, 0.05 -0.400526, -0.0746753 -0.458441, -0.195986 -0.5, -0.27 -0.499873, -0.344014 -0.499746, -0.410435 -0.499632, -0.44 -0.499582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
    11  0.444853     0.0704586    0.028405     edit curve Width=1.94083 Height=1.74577 AbsoluteFlag=0 SymType=0 cubic Bezier points (X Y): 0.5 0.305254, 0.5 0.295124, 0.5 0.294282, 0.5 0.274865, 0.5 0.255512, 0.174675 -0.342724, 0.05 -0.400527, -0.0746753 -0.458331, -0.195986 -0.5, -0.27 -0.499873, -0.344014 -0.499746, -0.410435 -0.499631, -0.44 -0.499581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
    12  0.446775     0.0704586    0.0284632    edit curve Width=1.94083 Height=1.73971 AbsoluteFlag=0 SymType=0 cubic Bezier points (X Y): 0.5 0.304575, 0.5 0.290816, 0.5 0.289247, 0.5 0.263298, 0.5 0.237438, 0.174675 -0.342856, 0.05 -0.400529, -0.0746753 -0.458202, -0.195986 -0.5, -0.27 -0.499872, -0.344014 -0.499745, -0.410435 -0.49963, -0.44 -0.499579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
    13  0.449658     0.0704586    0.0285505    edit curve Width=1.94083 Height=1.73062 AbsoluteFlag=0 SymType=0 cubic Bezier points (X Y): 0.5 0.303549, 0.5 0.285848, 0.5 0.283232, 0.5 0.250446, 0.5 0.217778, 0.174675 -0.343009, 0.05 -0.400532, -0.0746753 -0.458054, -0.195986 -0.5, -0.27 -0.499872, -0.344014 -0.499743, -0.410435 -0.499628, -0.44 -0.499577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
    14  0.453502     0.0704586    0.0286669    edit curve Width=1.94083 Height=1.71851 AbsoluteFlag=0 SymType=0 cubic Bezier points (X Y): 0.5 0.302164, 0.5 0.280424, 0.5 0.276456, 0.5 0.236943, 0.5 0.197577, 0.174675 -0.343177, 0.05 -0.400536, -0.0746753 -0.457895, -0.195986 -0.5, -0.27 -0.499871, -0.344014 -0.499742, -0.410435 -0.499626, -0.44 -0.499574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
    15  0.457392     0.0704586    0.0287848    edit curve Width=1.94083 Height=1.70624 AbsoluteFlag=0 SymType=0 cubic Bezier points (X Y): 0.5 0.300742, 0.5 0.275657, 0.5 0.270352, 0.5 0.225485, 0.5 0.180791, 0.174675 -0.343324, 0.05 -0.400539, -0.0746753 -0.457755, -0.195986 -0.5, -0.27 -0.49987, -0.344014 -0.49974, -0.410435 -0.499623, -0.44 -0.499571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
    16  0.480454     0.0704586    0.0294833    edit curve Width=1.94083 Height=1.63355 AbsoluteFlag=0 SymType=0 cubic Bezier points (X Y): 0.5 0.291876, 0.5 0.25308, 0.5 0.240172, 0.5 0.175489, 0.5 0.111084, 0.174675 -0.344036, 0.05 -0.400563, -0.0746753 -0.457091, -0.195986 -0.5, -0.27 -0.499864, -0.344014 -0.499728, -0.410435 -0.499606, -0.44 -0.499552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
    17  0.509281     0.0704586    0.0303564    edit curve Width=1.94083 Height=1.54269 AbsoluteFlag=0 SymType=0 cubic Bezier points (X Y): 0.5 0.279617, 0.5 0.22948, 0.5 0.207496, 0.5 0.129207, 0.5 0.0512765, 0.174675 -0.344806, 0.05 -0.400597, -0.0746753 -0.456387, -0.195986 -0.5, -0.27 -0.499856, -0.344014 -0.499712, -0.410435 -0.499583, -0.44 -0.499525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
    18  0.538108     0.0704586    0.0312295    edit curve Width=1.94083 Height=1.45182 AbsoluteFlag=0 SymType=0 cubic Bezier points (X Y): 0.5 0.265824, 0.5 0.207169, 0.5 0.176435, 0.5 0.0898588, 0.5 0.00369051, 0.174675 -0.345563, 0.05 -0.400634, -0.0746753 -0.455705, -0.195986 -0.5, -0.27 -0.499847, -0.344014 -0.499694, -0.410435 -0.499557, -0.44 -0.499496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
    19  0.576545     0.0704586    0.0327669    edit curve Width=1.94083 Height=1.26182 AbsoluteFlag=0 SymType=0 cubic Bezier points (X Y): 0.5 0.242455, 0.5 0.171341, 0.5 0.1245, 0.5 0.0291145, 0.5 -0.0658365, 0.174675 -0.346989, 0.05 -0.400729, -0.0746753 -0.454469, -0.195986 -0.5, -0.27 -0.499824, -0.344014 -0.499648, -0.410435 -0.49949, -0.44 -0.49942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
    20  0.614981     0.0704586    0.0343041    edit curve Width=1.94083 Height=1.07179 AbsoluteFlag=0 SymType=0 cubic Bezier points (X Y): 0.5 0.21081, 0.5 0.127086, 0.5 0.0587933, 0.5 -0.0403627, 0.5 -0.139057, 0.174675 -0.349059, 0.05 -0.400856, -0.0746753 -0.452653, -0.195986 -0.5, -0.27 -0.499793, -0.344014 -0.499586, -0.410435 -0.4994, -0.44 -0.499317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
    21  0.653417     0.0704586    0.0363479    edit curve Width=1.94083 Height=0.803881 AbsoluteFlag=0 SymType=0 cubic Bezier points (X Y): 0.5 0.148776, 0.5 0.0412517, 0.5 -0.0840788, 0.5 -0.173797, 0.5 -0.263059, 0.174675 -0.355301, 0.05 -0.401141, -0.0746753 -0.44698, -0.195986 -0.5, -0.27 -0.499724, -0.344014 -0.499448, -0.410435 -0.4992, -0.44 -0.499089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
    22  0.696636     0.0704586    0.0386464    edit curve Width=1.94083 Height=0.502673 AbsoluteFlag=0 SymType=0 cubic Bezier points (X Y): 0.5 0, 0.5 -0.158768, 0.5 -0.476303, 0.5 -0.476303, 0.5 -0.476303, 0.174675 -0.40196, 0.05 -0.40133, -0.0746753 -0.400699, -0.195986 -0.5, -0.27 -0.499558, -0.344014 -0.499117, -0.410435 -0.49872, -0.44 -0.498544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
    23  0.73029      0.0704586    0.038649     edit curve Width=1.94083 Height=0.437261 AbsoluteFlag=0 SymType=0 cubic Bezier points (X Y): 0.5 -0.000314006, 0.5 -0.166876, 0.5 -0.5, 0.5 -0.5, 0.5 -0.5, 0.174675 -0.395872, 0.05 -0.395192, -0.0746753 -0.394512, -0.195986 -0.493169, -0.27 -0.492664, -0.344014 -0.492158, -0.410435 -0.491704, -0.44 -0.491502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
    24  0.768726     0.0704586    0.0386464    edit curve Width=1.94083 Height=0.380212 AbsoluteFlag=0 SymType=0 cubic Bezier points (X Y): 0.5 0, 0.5 -0.166667, 0.5 -0.5, 0.5 -0.5, 0.5 -0.5, 0.174675 -0.367539, 0.05 -0.366812, -0.0746753 -0.366086, -0.195986 -0.459028, -0.27 -0.458486, -0.344014 -0.457944, -0.410435 -0.457458, -0.44 -0.457241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
    25  0.807163     0.0704586    0.0386464    edit curve Width=1.94083 Height=0.315375 AbsoluteFlag=0 SymType=0 cubic Bezier points (X Y): 0.5 0, 0.5 -0.166667, 0.5 -0.5, 0.5 -0.5, 0.5 -0.5, 0.174675 -0.337748, 0.05 -0.336942, -0.0746753 -0.336136, -0.195986 -0.423455, -0.27 -0.42285, -0.344014 -0.422246, -0.410435 -0.421704, -0.44 -0.421462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
    26  0.845599     0.0704586    0.0386464    edit curve Width=1.94083 Height=0.243463 AbsoluteFlag=0 SymType=0 cubic Bezier points (X Y): 0.5 0, 0.5 -0.166667, 0.5 -0.5, 0.5 -0.5, 0.5 -0.5, 0.174675 -0.300924, 0.05 -0.299992, -0.0746753 -0.29906, -0.195986 -0.380151, -0.27 -0.379445, -0.344014 -0.37874, -0.410435 -0.378107, -0.44 -0.377825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
    27  0.884035     0.0704586    0.0386464    edit curve Width=1.94083 Height=0.164967 AbsoluteFlag=0 SymType=0 cubic Bezier points (X Y): 0.5 0, 0.5 -0.166667, 0.5 -0.5, 0.5 -0.5, 0.5 -0.5, 0.174675 -0.241997, 0.05 -0.240887, -0.0746753 -0.239776, -0.195986 -0.312272, -0.27 -0.31141, -0.344014 -0.310548, -0.410435 -0.309774, -0.44 -0.309429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
    28  0.912863     0.0704586    0.0386498    edit curve Width=1.94083 Height=0.105638 AbsoluteFlag=0 SymType=0 cubic Bezier points (X Y): 0.5 -0.00167385, 0.5 -0.167783, 0.5 -0.5, 0.5 -0.5, 0.5 -0.5, 0.174675 -0.321273, 0.05 -0.318959, -0.0746753 -0.316645, -0.195986 -0.40493, -0.27 -0.403158, -0.344014 -0.401387, -0.410435 -0.399798, -0.44 -0.39909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
    29  0.932081     0.0704586    0.0386676    edit curve Width=1.94083 Height=0.0811345 AbsoluteFlag=0 SymType=0 cubic Bezier points (X Y): 0.5 -0.0136097, 0.5 -0.17574, 0.5 -0.5, 0.5 -0.5, 0.5 -0.5, 0.174675 -0.379324, 0.05 -0.37577, -0.0746753 -0.372216, -0.195986 -0.465434, -0.27 -0.46275, -0.344014 -0.460065, -0.410435 -0.457656, -0.44 -0.456584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
    30  0.94169      0.0704586    0.0386691    edit curve Width=1.94083 Height=0.0696521 AbsoluteFlag=0 SymType=0 cubic Bezier points (X Y): 0.5 -0.0169889, 0.5 -0.169897, 0.5 -0.475712, 0.5 -0.475712, 0.5 -0.475712, 0.174675 -0.414962, 0.05 -0.410262, -0.0746753 -0.405561, -0.195986 -0.5, -0.27 -0.496812, -0.344014 -0.493624, -0.410435 -0.490763, -0.44 -0.48949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
    31  0.947455     0.0704586    0.038654     edit curve Width=1.94083 Height=0.0644349 AbsoluteFlag=0 SymType=0 cubic Bezier points (X Y): 0.5 -0.00612496, 0.5 -0.141271, 0.5 -0.397075, 0.5 -0.411564, 0.5 -0.426053, 0.174675 -0.40741, 0.05 -0.413895, -0.0746753 -0.419768, -0.195986 -0.5, -0.27 -0.496554, -0.344014 -0.493108, -0.410435 -0.490016, -0.44 -0.488639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
    32  0.95034      0.0704586    0.0386464    edit curve Width=1.94083 Height=0.0618241 AbsoluteFlag=0 SymType=0 cubic Bezier points (X Y): 0.5 0, 0.5 -0.122067, 0.5 -0.325511, 0.5 -0.3662, 0.5 -0.406889, 0.174675 -0.394585, 0.05 -0.414887, -0.0746753 -0.434717, -0.195986 -0.5, -0.27 -0.496409, -0.344014 -0.492817, -0.410435 -0.489594, -0.44 -0.488159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

VSPAERO settings: Sref=680.171 bref=34.8753 cref=22.5169 Xcg=0 Ycg=0 Zcg=0 AlphaStart=0 AlphaEnd=10 AlphaNpts=3 BetaStart=0 BetaEnd=0 BetaNpts=1 MachStart=0 MachEnd=0 MachNpts=1 ReCref=1e+07 Vinf=100 Rho=0.002377
