OpenVSP model (file version 5), 4 components.
Geometry view with OpenVSP parameter names; values to 6 digits, angles in degrees, lengths in the model's unit.
Overall bounding box: X_Min=0 X_Len=28.735 Y_Min=-15.709 Y_Len=31.418 Z_Min=-0.960339 Z_Len=6.09929

Fuselage "Fuselage"
  location (X Y Z) 0 0 0, rotation 0 0 0
  bounding box size 27.3294 4.97843 3.11542
  Design: Length=27.3294
  cross sections:
    n   XLocPercent  YLocPercent  ZLocPercent  shape
    0   0            0            0            point
    1   0.128067     0            0.00815899   edit curve Width=2.71269 Height=1.45942 AbsoluteFlag=0 SymType=0 cubic Bezier points (X Y): 0.5 0.22, 0.47 0.15, 0.43 -0.005, 0.39125 -0.15, 0.3525 -0.295, 0.315 -0.43, 0.29 -0.46, 0.27 -0.48, 0.2275 -0.49, 0.175 -0.495, 0.1225 -0.5, 0.06 -0.5, 0 -0.5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
    2   0.25         0            0.016704     edit curve Width=4.32675 Height=2.50906 AbsoluteFlag=0 SymType=0 cubic Bezier points (X Y): 0.5 0.22, 0.47 0.15, 0.43 -0.005, 0.39125 -0.15, 0.3525 -0.295, 0.315 -0.43, 0.29 -0.46, 0.27 -0.48, 0.2275 -0.49, 0.175 -0.495, 0.1225 -0.5, 0.06 -0.5, 0 -0.5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
    3   0.336634     0            0.021441     edit curve Width=4.83396 Height=2.97252 AbsoluteFlag=0 SymType=0 cubic Bezier points (X Y): 0.5 0.219977, 0.47 0.14997, 0.43 -0.00505585, 0.39125 -0.150276, 0.3525 -0.294936, 0.315 -0.429984, 0.29 -0.459992, 0.27 -0.479996, 0.2275 -0.489998, 0.175 -0.494999, 0.1225 -0.5, 0.06 -0.5, 0 -0.5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
    4   0.384202     0            0.0225794    edit curve Width=4.94569 Height=3.08584 AbsoluteFlag=0 SymType=0 cubic Bezier points (X Y): 0.5 0.323564, 0.488356 0.275714, 0.472831 0.195201, 0.457791 0.11853, 0.442751 0.0229037, 0.318157 -0.43, 0.292907 -0.46, 0.272706 -0.48, 0.22978 -0.49, 0.176754 -0.495, 0.123728 -0.5, 0.0606014 -0.5, 0 -0.5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
    5   0.409815     0            0.022631     edit curve Width=4.91962 Height=3.09734 AbsoluteFlag=0 SymType=0 cubic Bezier points (X Y): 0.5 0.381715, 0.498942 0.346205, 0.497532 0.307779, 0.496167 0.2697, 0.494801 0.202375, 0.323786 -0.429912, 0.298089 -0.459941, 0.277531 -0.479967, 0.233845 -0.489983, 0.179881 -0.494991, 0.125917 -0.5, 0.0616735 -0.5, 0 -0.5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
    6   0.418963     0            0.0226463    edit curve Width=4.91475 Height=3.10083 AbsoluteFlag=0 SymType=0 cubic Bezier points (X Y): 0.5 0.387236, 0.5 0.352873, 0.5 0.318509, 0.5 0.284146, 0.5 0.219648, 0.325437 -0.429861, 0.299609 -0.459907, 0.278946 -0.479948, 0.235038 -0.489972, 0.180798 -0.494986, 0.126559 -0.5, 0.061988 -0.5, 0 -0.5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
    7   0.442747     0            0.0226773    edit curve Width=4.91475 Height=3.10823 AbsoluteFlag=0 SymType=0 cubic Bezier points (X Y): 0.5 0.386772, 0.5 0.352247, 0.5 0.317722, 0.5 0.283197, 0.5 0.218851, 0.328463 -0.42975, 0.302395 -0.459831, 0.28154 -0.479905, 0.237223 -0.48995, 0.18248 -0.494974, 0.127736 -0.5, 0.0625644 -0.5, 0 -0.5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
    8   0.488784     0            0.0226972    edit curve Width=4.91475 Height=3.1146 AbsoluteFlag=0 SymType=0 cubic Bezier points (X Y): 0.5 0.385988, 0.5 0.351474, 0.5 0.316959, 0.5 0.282444, 0.5 0.21823, 0.331248 -0.43, 0.304959 -0.46, 0.283927 -0.48, 0.239235 -0.49, 0.184027 -0.495, 0.128819 -0.5, 0.0630949 -0.5, 0 -0.5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
    9   0.537882     0            0.0223594    edit curve Width=4.91475 Height=3.09703 AbsoluteFlag=0 SymType=0 cubic Bezier points (X Y): 0.5 0.38867, 0.5 0.354789, 0.5 0.320907, 0.5 0.287026, 0.5 0.222448, 0.330313 -0.430495, 0.304098 -0.460317, 0.283126 -0.480172, 0.23856 -0.49009, 0.183507 -0.495046, 0.128455 -0.5, 0.0629169 -0.5, 0 -0.5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
    10  0.614723     0            0.0212642    edit curve Width=4.91475 Height=3.03772 AbsoluteFlag=0 SymType=0 cubic Bezier points (X Y): 0.5 0.396304, 0.5 0.36503, 0.5 0.333757, 0.5 0.302484, 0.5 0.236645, 0.327002 -0.43, 0.30105 -0.46, 0.280288 -0.48, 0.236168 -0.49, 0.181668 -0.495, 0.127168 -0.5, 0.0622862 -0.5, 0 -0.5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
    11  0.634847     0            0.0210785    edit curve Width=4.91475 Height=3.01876 AbsoluteFlag=0 SymType=0 cubic Bezier points (X Y): 0.5 0.398063, 0.5 0.367397, 0.5 0.336731, 0.5 0.306065, 0.5 0.239813, 0.32608 -0.42974, 0.300201 -0.459851, 0.279497 -0.479926, 0.235502 -0.489963, 0.181156 -0.494981, 0.126809 -0.5, 0.0621105 -0.5, 0 -0.5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
    12  0.645825     0            0.0210355    edit curve Width=4.91894 Height=3.00451 AbsoluteFlag=0 SymType=0 cubic Bezier points (X Y): 0.5 0.394422, 0.499209 0.363086, 0.498155 0.329562, 0.497133 0.296264, 0.496112 0.227676, 0.325249 -0.429648, 0.299436 -0.459799, 0.278785 -0.4799, 0.234902 -0.48995, 0.180694 -0.494975, 0.126486 -0.5, 0.0619522 -0.5, 0 -0.5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
    13  0.684245     0            0.021179     edit curve Width=4.96615 Height=2.93519 AbsoluteFlag=0 SymType=0 cubic Bezier points (X Y): 0.5 0.330531, 0.487987 0.285912, 0.471969 0.20726, 0.456451 0.13191, 0.440934 0.0330875, 0.32001 -0.42956, 0.294613 -0.459749, 0.274295 -0.479875, 0.231119 -0.489937, 0.177784 -0.494969, 0.124449 -0.5, 0.0609544 -0.5, 0 -0.5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
    14  0.75         0            0.0223089    edit curve Width=4.97843 Height=2.76062 AbsoluteFlag=0 SymType=0 cubic Bezier points (X Y): 0.5 0.22, 0.47 0.15, 0.43 -0.005, 0.39125 -0.15, 0.3525 -0.295, 0.315 -0.43, 0.29 -0.46, 0.27 -0.48, 0.2275 -0.49, 0.175 -0.495, 0.1225 -0.5, 0.06 -0.5, 0 -0.5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
    15  0.856221     0            0.0355055    edit curve Width=4.84603 Height=1.83931 AbsoluteFlag=0 SymType=0 cubic Bezier points (X Y): 0.5 0.22, 0.47 0.15, 0.43 -0.005, 0.39125 -0.15, 0.3525 -0.295, 0.315 -0.43, 0.29 -0.46, 0.27 -0.48, 0.2275 -0.49, 0.175 -0.495, 0.1225 -0.5, 0.06 -0.5, 0 -0.5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
    16  0.922084     0            0.0430847    edit curve Width=4.36032 Height=1.22504 AbsoluteFlag=0 SymType=0 cubic Bezier points (X Y): 0.5 0.22, 0.47 0.15, 0.43 -0.005, 0.39125 -0.15, 0.3525 -0.295, 0.315 -0.43, 0.29 -0.46, 0.27 -0.48, 0.2275 -0.49, 0.175 -0.495, 0.1225 -0.5, 0.06 -0.5, 0 -0.5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
    17  0.973311     0            0.0500768    edit curve Width=3.72183 Height=0.702862 AbsoluteFlag=0 SymType=0 cubic Bezier points (X Y): 0.5 0.22, 0.47 0.15, 0.43 -0.005, 0.39125 -0.15, 0.3525 -0.295, 0.315 -0.43, 0.29 -0.46, 0.27 -0.48, 0.2275 -0.49, 0.175 -0.495, 0.1225 -0.5, 0.06 -0.5, 0 -0.5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
    18  0.998902     0            0.0500768    edit curve Width=3.28182 Height=0.22 AbsoluteFlag=0 SymType=0 cubic Bezier points (X Y): 0.5 0.22, 0.47 0.15, 0.43 -0.005, 0.39125 -0.15, 0.3525 -0.295, 0.315 -0.43, 0.29 -0.46, 0.27 -0.48, 0.2275 -0.49, 0.175 -0.495, 0.1225 -0.5, 0.06 -0.5, 0 -0.5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
    19  1            0            0.0500768    point

Fuselage "Gondola"
  location (X Y Z) 8.68852 0 2.78689, rotation 0 0 0
  bounding box size 13.9712 3.92788 1.61343
  Design: Length=18.6409
  cross sections:
    n  XLocPercent  YLocPercent  ZLocPercent  shape
    0  0            0            0            point
    1  0.250506     0            -0.00219203  edit curve Width=3.92788 Height=1.09285 AbsoluteFlag=0 SymType=0 cubic Bezier points (X Y): 0.5 -0.494814, 0.416667 -0.494814, 0.333333 -0.494814, 0.25 -0.494814, 0.166667 -0.494814, 0.0833333 -0.494814, 0 -0.494814, -0.0833333 -0.494814, -0.166667 -0.494814, -0.25 -0.494814, -0.333333 -0.494814, -0.416667 -0.494814, -0.5 -0.494814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
    2  0.435145     0            -0.00427348  edit curve Width=3.87753 Height=1.17045 AbsoluteFlag=0 SymType=0 cubic Bezier points (X Y): 0.5 -0.492927, 0.416667 -0.492927, 0.333333 -0.492927, 0.25 -0.492927, 0.166667 -0.492927, 0.0833333 -0.492927, 0 -0.492927, -0.0833333 -0.492927, -0.166667 -0.492927, -0.25 -0.492927, -0.333333 -0.492927, -0.416667 -0.492927, -0.5 -0.492927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
    3  0.633475     0            -0.00921155  edit curve Width=3.78361 Height=1.20635 AbsoluteFlag=0 SymType=0 cubic Bezier points (X Y): 0.5 -0.493886, 0.416667 -0.493886, 0.333333 -0.493886, 0.25 -0.493886, 0.166667 -0.493886, 0.0833333 -0.493886, 0 -0.493886, -0.0833333 -0.493886, -0.166667 -0.493886, -0.25 -0.493886, -0.333333 -0.493886, -0.416667 -0.493886, -0.5 -0.493886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
    4  0.789205     0            -0.0252919   edit curve Width=3.68298 Height=0.806845 AbsoluteFlag=0 SymType=0 cubic Bezier points (X Y): 0.5 -0.443738, 0.416667 -0.443738, 0.333333 -0.443738, 0.25 -0.443738, 0.166667 -0.443738, 0.0833333 -0.443738, 0 -0.443738, -0.0833333 -0.443738, -0.166667 -0.443738, -0.25 -0.443738, -0.333333 -0.443738, -0.416667 -0.443738, -0.5 -0.443738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
    5  0.885767     0            -0.0386723   edit curve Width=3.31384 Height=0.508 AbsoluteFlag=0 SymType=0 cubic Bezier points (X Y): 0.5 -0.436081, 0.416667 -0.436081, 0.333333 -0.436081, 0.25 -0.436081, 0.166667 -0.436081, 0.0833333 -0.436081, 0 -0.436081, -0.0833333 -0.436081, -0.166667 -0.436081, -0.25 -0.436081, -0.333333 -0.436081, -0.416667 -0.436081, -0.5 -0.436081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
    6  0.960871     0            -0.0464509   edit curve Width=2.82859 Height=0.358 AbsoluteFlag=0 SymType=0 cubic Bezier points (X Y): 0.5 -0.46235, 0.416667 -0.46235, 0.333333 -0.46235, 0.25 -0.46235, 0.166667 -0.46235, 0.0833333 -0.46235, 0 -0.46235, -0.0833333 -0.46235, -0.166667 -0.46235, -0.25 -0.46235, -0.333333 -0.46235, -0.416667 -0.46235, -0.5 -0.46235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
    7  0.998391     0            -0.0464509   edit curve Width=2.49418 Height=0.258 AbsoluteFlag=0 SymType=0 cubic Bezier points (X Y): 0.5 -0.484695, 0.416667 -0.484695, 0.333333 -0.484695, 0.25 -0.484695, 0.166667 -0.484695, 0.0833333 -0.484695, 0 -0.484695, -0.0833333 -0.484695, -0.166667 -0.484695, -0.25 -0.484695, -0.333333 -0.484695, -0.416667 -0.484695, -0.5 -0.484695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
    8  1            0            -0.0464509   point

Wing "Wing"
  location (X Y Z) 11.5164 2.45902 1.72131, rotation 0 0 0
  symmetric about XZ
  bounding box size 10.5312 31.418 0.578788
  totals: TotalSpan=26.5 TotalProjectedSpan=26.5 TotalChord=4.17063 TotalArea=98.3343 TotalAR=7.14145 MAC=3.82043
  root: chord 5.66667, twist 0, NACA 4-series Camber=0.02 CamberLoc=0.4 ThickChord=0.1
  sections:
    n  Span  Root_Chord  Tip_Chord  Area     Sweep  Sweep_Location  Dihedral  Twist  Twist_Location  tip airfoil
    1  2.25  5.66667     4.06746    10.9509  30     0               0         0      0.25            NACA 4-series Camber=0.02 CamberLoc=0.4 ThickChord=0.09
    2  11    4.06746     2.88095    38.2163  30     0               0         0      0.25            NACA 4-series Camber=0.02 CamberLoc=0.4 ThickChord=0.08

Wing "GO"
  location (X Y Z) 23.3607 2.21311 1.31148, rotation 38 0 0
  symmetric about XZ
  bounding box size 5.37433 14.1105 3.94144
  totals: TotalSpan=12.0635 TotalProjectedSpan=12.0635 TotalChord=3.0496 TotalArea=36.7889 TotalAR=3.95576 MAC=3.08407
  root: chord 3.61111, twist 0, NACA 4-series Camber=0 CamberLoc=0.2 ThickChord=0.08
  sections:
    n  Span     Root_Chord  Tip_Chord  Area     Sweep    Sweep_Location  Dihedral  Twist  Twist_Location  tip airfoil
    1  6.03175  3.61111     2.4881     18.3944  25.5714  0               0         0      0.25            NACA 4-series Camber=0 CamberLoc=0.2 ThickChord=0.06
